// SBML level 2 version 4

model New_Model_1_1()

  // Compartments:
  compartment Intracellular = 1;

  // Species:
  species Glucose in Intracellular = 100;
  species Oxygen in Intracellular = 100;
  species Energy in Intracellular = 450;
  species Lactate in Intracellular = 0;
  species apoptosis_rate in Intracellular = 0;
  species migration_speed in Intracellular = 0;
  species Lac_Secretion_Rate in Intracellular = 0;
  species Transition_Rate in Intracellular = 0;
  species Delayed_Oxygen in Intracellular = 100;

  // Parameters:
  k_aer = 0.01;
  k_ane = 0.00018;
  k_usage = 0.0023;
  oxygen_thresh = 440; oxygen_thresh is "energy_move_thresh";
  energy_death_thresh = 430;
  energy_prolif_thresh = 445;

  // Reactions:
  Aerobic: Glucose + 6 Oxygen => 38 Energy; Intracellular*k_aer*Glucose*Oxygen^6;
  Anaerobic: Glucose => 2 Energy + Lactate; Intracellular*k_ane*Glucose;
  Energy_Usage: Energy => ; Intracellular*k_usage*Energy;

  // Events:
  die: at (Energy < energy_death_thresh): apoptosis_rate = 9e99;
  do_not_move: at (Energy > oxygen_thresh): migration_speed = 0;
  move: at (Energy < oxygen_thresh): migration_speed = 10;
  Lac_Sec: at (Lactate > 0.01): Lac_Secretion_Rate = 0.0001;
  divide: at (Energy > energy_prolif_thresh): Transition_Rate = 0.0001666666;
  do_not_divide: at (Energy < energy_prolif_thresh): Transition_Rate = 0;

  // Unit definitions:
  unit length = 1e-6 metre;
  unit area = (1e-6 metre)^2;
  unit volume = 1e-3 litre;
  unit time = 0.06 second;
  unit substance = 1e-3 mole;
end
